// generated by /Users/david/Documents/GitHub/slacgismo/gridlabd/converters/idf2glm.py on 2022-11-22 07:05:26.949167
// output to autotest/test_idf2glm_output.glm
class building {
	char32 weather;
	double occupancy[unit];
	double lighting[W];
	double equipment[W];
	double floor_area[sf];
	double perimeter[ft];
	double roof_area[sf];
	double window_area[sf];
	double wall_area[sf];
	double thermal_conductance[Btu/degF/h];
	double thermal_mass[Btu/degF];
	double solar_absorptance[pu];
	double solar_transmittance[pu];
}

// input from autotest/test_idf2glm_input.idf
object building {
	name "Metal Roof Surface";
	latitude 37.62;
	longitude -122.4;
	weather "9q8yn8";
	occupancy 2 unit;
	lighting 1070 W;
	equipment 549 W;
	floor_area 127.5 m^2;
	perimeter 45.9 m;
	window_area 17.6 m^2;
	wall_area 125.9 m^2;
	roof_area 127.5 m^2;
	thermal_conductance 133.3 W/K;
	thermal_mass 10.9 MJ/K;
	solar_absorptance 0.000 pu;
	solar_transmittance 0.000 pu;
}
//#set savefile=${modelname/.glm/.json}
