clock
{
	timezone "US/CA/Los Angeles";
	starttime "2020-01-01 00:00:00 PST";
	stoptime "2020-01-02 00:00:00 PST";
}

#input "test_mdb_12kV_feeder_opt.mdb" -t cyme  -p POSTPROC=write_glm.py,network_graph.py -p EXTRACT=non-empty -p PNG_FIGSIZE=50x50 -p PNG_FONTSIZE=16 -p PNG_NODESIZE=30 -p PNG_NODECOLOR=byphase -p PNG_LAYOUT=nodexy -p GLM_MODIFY=test_mdb_12kV_feeder_modify.csv -p GLM_ASSUMPTIONS=include
