#begin python
import sys
import gridlabd
print(gridlabd.title(),file=sys.stderr)
print(gridlabd.version(),file=sys.stderr)
print(gridlabd.copyright(),file=sys.stderr)
gridlabd.warning('a warning message')
gridlabd.error('an error message')
#end
