#input "CA-San_Francisco_Intl_Ap.tmy3"
module residential;
#set pythonpath=.
module thermostat;
object house
{
	parent "meter_1";
	name "house_1";
	on_init python:thermostat.setup;
	on_precommit python:thermostat.update;
};
