module tape
{
	csv_header_type NAME;
}
object recorder
{
	parent "house_0";
	property "air_temperature[degF],system_mode";
	interval -1;
	file "house_0_temperature.csv";
	line_units NONE;
};
#output "house_0_temperature.png" -t csvplot
object recorder
{
	parent "meter_0";
	property "measured_real_energy_delta[kWh]";
	interval 1 h;
	file "meter_0_energy.csv";
	line_units NONE;
};
#output "meter_0_energy.png" -t csvplot
