module tape
{
	csv_header_type NAME;
}
object recorder
{
	parent "house_1";
	property "air_temperature[degF],system_mode";
	interval 2 min;
	file "house_1_temperature.csv";
	line_units NONE;
};
#output "house_1_temperature.png" -t csvplot
object recorder
{
	parent "meter_1";
	property "measured_real_energy_delta[kWh]";
	interval 1 h;
	file "meter_1_energy.csv";
	line_units NONE;
};
#output "meter_1_energy.png" -t csvplot
