// generated by csv-ami2glm-ceus.py
object ceus {
    parent "${object.last}";
    floor_area "0.0";
    filename "ceus.csv";
    total_real_power "0.0";
    total_reactive_power "0.0";
    total_power_A "0+0i";
    total_power_B "0+0i";
    total_power_C "0+0i";
    weather "";
    tariff "";
}
