module example;
#set savefile=gridlabd.json
clock
{
	starttime "2000-01-01 00:00:00";
	stoptime "2000-02-01 00:00:00";
}
class example_class
{
	python my_list;
	complex my_value;
	char32 my_string;
	double my_real[m/s];
}
object example_class
{
	name "my_example";
	my_list "list(['test',12.34,dict(a=123,b=456)])";
	my_value 1.234+5.6789j;
	my_string "this is a short string";
	my_real 100 ft/s;
}
