////////////////////////////////////////////////////////
// BEGIN
////////////////////////////////////////////////////////
// filename... gridlabd.glm
// workdir.... /Users/dchassin/github/gridlabd/gldcore/autotest
// command.... /usr/local/bin/gridlabd.bin /Users/dchassin/github/gridlabd/gldcore/autotest/test_string.glm
// created.... Sun Aug  4 10:38:08 2019
// user....... dchassin
// host....... (null)
// modules.... 0
// classes.... 1
// objects.... 1
// options.... MINIMAL

////////////////////////////////////////////////////////

// CLOCK
clock {
	timezone "UTC0";
	starttime "2000-01-01 00:00:00 UTC";
	stoptime "NEVER";
}

////////////////////////////////////////////////////////
// modules

////////////////////////////////////////////////////////
// classes
class test {
	string var;
}

////////////////////////////////////////////////////////
// objects
object test {
	name "test:0";
	var "this is a test";
}

////////////////////////////////////////////////////////
// END
////////////////////////////////////////////////////////
