#define v_per_unit_max_limit="1.05"
#define v_per_unit_min_limit="0.95"
#define change_in_voltage_limit="3"
#define linear_search_step="5000"
#define linear_search_initial="1000"
#define ica_type="1"
#define binary_search_initial="1000"
#define bineary_search_step="500000"
#define bineary_search_tolerance="500"
#define bineary_search_max="15000000"
