#set compileonly=TRUE

clock
{
    starttime "2020-01-01 00:00:00";
    stoptime "2021-01-01 00:00:00";
}
schedule test
{
    0 * * * * 1.0;
}

class test
{
    double test;
}

module assert;

object test
{
    name "test";
    test "test*1+0";
}

#set glm_save_options=ORIGINAL|NOGLOBALS
#set savefile=test.glm
