// Filter test simple delay
//
#set randomseed=123

clock {
    timezone PST+8PDT;
    starttime '2000-01-01 00:00:00 PST';
    stoptime '2000-01-02 00:00:00 PST';
}
#set randomseed=1
filter delay(z,5min,10s,resolution=8,minimum=-2.5,maximum=2.5) = 1/z;
class from {
    randomvar value;
}
class to {
    double value;
}
object from {
    name from;
    value "type:normal(0,1); min:-3.0; max:+3.0; refresh:1min";
}
object to {
    name to;
    value delay(from:value);
}

module tape
{
    csv_header_type NAME;
}
object multi_recorder {
    file ${modelname/.glm/.csv};
    interval -1;
    property "from:value,to:value";
}

module assert;
object assert {
    parent to;
    start '2000-01-01 00:00:00 PST';
    stop '2000-01-01 00:05:09 PST';
    target value;
    relation ==;
    value 0.0;
    within 1e-4;
}
object assert {
    parent to;
    start '2000-01-01 00:05:10 PST';
    stop '2000-01-01 00:10:09 PST';
    target value;
    relation ==;
    value +0.443108;
    within 1e-4;
}

#set debug=TRUE
#set output_message_context=TRANSFORM
#set suppress_repeat_messages=FALSE
