#weather get Seattle

#setenv GLPATH=${GLPATH}:${GLPATH}/weather/US
#define file=${FINDFILE WA-Seattle_Boeing_Field_Isis.tmy3}
#ifexist ${file}
#print ${file} found
#else
#error weather file not found
#endif
