// File: test_json_conversion.glm
//
// This autotest verifies that a GLM converted to JSON and back to GLM
// produces the same output as the original GLM
//

#set suppress_repeat_messages=FALSE

#ifndef SAVEFILE // main run does not specify SAVEFILE

#warning *** Running step 1 ***
#exec gridlabd -D SAVEFILE=waterheater_1.csv test_json_conversion.glm

#warning *** Running step 2 ***
#exec gridlabd -D SAVEFILE=waterheater_2.csv -D filesave_options=ALLINITIAL -I test_json_conversion.glm -o test_json_conversion_save.json

#warning *** Running step 3 ***
#exec gridlabd test_json_conversion_save.json -o test_json_conversion_final.glm

#warning *** Running step 4 ***
#exec diff -wq waterheater_1.csv waterheater_2.csv

#else // simulation run specifies SAVEFILE

#define STARTTIME="2020-01-01 00:00:00"
#define STOPTIME="2020-01-02 00:00:00"

#set randomseed=7
clock {
	timezone EST+5EDT;
	starttime ${STARTTIME};
	stoptime ${STOPTIME};
};

module climate;

object climate {
  name TX_Houston;
  tmyfile "../WA-Yakima.tmy3";
  interpolate QUADRATIC;
};

module residential;
module tape
{
	csv_data_only 1;
}
class waterheater
{
	loadshape wh_shape;
	char1024 supernode_name;
}

schedule waterheater_demand_prob {
	* 5-21 * * * 0.99;
	* 22-4 * * * 0.01;
}

object house {
		name "house_1";
		floor_area random.triangle(1000,1500);
		cooling_setpoint 76 degF;
		heating_setpoint 65 degF;
		hvac_power_factor 0.75;
		object waterheater {
			name "waterheater_1";
			wh_shape "type: pulsed; schedule: waterheater_demand_prob; energy: 7.2 kWh; count: 6; power: 300 W";
			tank_setpoint 130;
			water_demand this.wh_shape*0.165; //scaling issue with loadshape/schedules
			heating_element_capacity 4500 W;
			tank_volume 50 gal;
			power_factor 1.0;
			power_fraction 0.0;
			current_fraction 0.0;
			object recorder {
				file "${SAVEFILE}";
				property water_demand;
				interval 60;
			};//RECORDER
		}; //WH
	}; //House

#endif // SAVEFILE
