class test {
    char1024 dict;
    char1024 list;
}

object test {
    dict {"a":["b","c","d"],"e":["f","g","h"],"i":"j"};
    list ["a","b","c"];
}
#set savefile=gridlabd.json
#on_exit 0 python3 ../check_json.py
