#library get wood_pole.glm
#system ls -l /usr/local/share/gridlabd/library/US/CA/SLAC
#option library US/CA/SLAC/wood_pole.glm

class test {
	object lib;
}

module assert;
object test {
	lib "WOOD-C-45/5";
	object assert{
		target lib;
		relation "==";
		value "WOOD-C-45/5";
	};
}
