#option verbose

clock
{
    timezone "US/CA/Los Angeles";
    starttime "2020-01-01 00:00:00 PST";
    stoptime "2021-01-01 00:00:00 PST";
}

module residential;
module tape;
object house
{
    object recorder
    {
        file "test_output_save.csv";
        property "air_temperature";
        interval "1h";
    };
}

#output "test_output_save.png"
