// test schedule transforms
// test schedule transforms
#print "Processing test_schedule_xform"
#set randomseed=17

module tape;
module residential;

clock {
	timezone PST+8PDT;
	starttime '2009-01-01 0:00:00 PST';
	stoptime '2009-01-02 0:00:00 PST';
}

schedule test_schedule {
	0-29 * * * * 0;
	30-59 * * * * 1;
}

class house {
	double my_double;
	int32 my_int32;
	enumeration {A=0, B=1, C=2, D=3, E=4} my_enum;
	set {A=1, B=2, C=4, D=8} my_set;
	complex my_complex;
}

object house {
	my_double test_schedule*2.58+1;
	my_int32 test_schedule*2.58+1;
	my_enum test_schedule*2.58+1;
	my_set test_schedule*2.58+1;
	my_complex test_schedule*2.58+1;
	object recorder {
		property "my_double,my_int32,my_enum,my_set,my_complex";
		file "test_schedule_xform_output.csv";
	};
}
