#set debug=0
#set suppress_repeat_messages=0

class test {
	char1024 var;
}

object test {
	var """\
Test00000 Test00010 Test00020 Test00030 Test00040 Test00050 Test00060 Test00070 Test00080 Test00090 \
Test00100 Test00110 Test00120 Test00130 Test00140 Test00150 Test00160 Test00170 Test00180 Test00190 \
Test00200 Test00210 Test00220 Test00230 Test00240 Test00250 Test00260 Test00270 Test00280 Test00290 \
Test00300 Test00310 Test00320 Test00330 Test00340 Test00350 Test00360 Test00370 Test00330 Test00390 \
Test00400 Test00410 Test00420 Test00430 Test00440 Test00450 Test00460 Test00470 Test00480 Test00490 \
Test00500 Test00510 Test00520 Test00530 Test00540 Test00550 Test00560 Test00570 Test00580 Test00590 \
Test00600 Test00610 Test00620 Test00630 Test00640 Test00650 Test00660 Test00670 Test00680 Test00690 \
Test00700 Test00710 Test00720 Test00730 Test00740 Test00750 Test00760 Test00770 Test00780 Test00790 \
Test00800 Test00810 Test00820 Test00830 Test00840 Test00850 Test00860 Test00870 Test00880 Test00890 \
Test00900 Test00910 Test00920 Test00930 Test00940 Test00950 Test00960 Test00970 Test00980 Test00990 \
Test01000 Test01010 Test01020 Test01030 Test01040 Test01050 Test01060 Test01070 Test01080 Test01090 \
Test01100 Test01110 Test01120 Test01130 Test01140 Test01150 Test01160 Test01170 Test01180 Test01190 \
Test01200 Test01210 Test01220 Test01230 Test01240 Test01250 Test01260 Test01270 Test01280 Test01290 \
Test01300 Test01310 Test01320 Test01330 Test01340 Test01350 Test01360 Test01370 Test01330 Test01390 \
Test01400 Test01410 Test01420 Test01430 Test01440 Test01450 Test01460 Test01470 Test01480 Test01490 \
Test01500 Test01510 Test01520 Test01530 Test01540 Test01550 Test01560 Test01570 Test01580 Test01590 \
Test01600 Test01610 Test01620 Test01630 Test01640 Test01650 Test01660 Test01670 Test01680 Test01690 \
Test01700 Test01710 Test01720 Test01730 Test01740 Test01750 Test01760 Test01770 Test01780 Test01790 \
Test01800 Test01810 Test01820 Test01830 Test01840 Test01850 Test01860 Test01870 Test01880 Test01890 \
Test01900 Test01910 Test01920 Test01930 Test01940 Test01950 Test01960 Test01970 Test01980 Test01990""";
}

#set glm_save_options=MINIMAL
#set savefile=gridlabd.glm
