module tape;
module residential;
module assert;

clock {
	starttime '2000-01-01 00:00:00';
	stoptime '2000-01-02 00:00:00';
}

object house {
	load {
		total 7;
		demand 12;
		energy 24;
	};
	//object recorder {
	//	property panel.power;
	//	interval -1;
	//	file test_struct.csv;
	//};
	object complex_assert {
		target "panel.power";
		object player {
			property value;
			file "../test_struct.player";
		};
		within 0.01;
	};
}
