// this test will detect changes in the download of weather data or the output of weather info
#exec gridlabd-weather get San_Diego > /dev/null
#exec gridlabd-weather info San_Diego | cut -f2- -d, > San_Diego.csv
#exec diff -w San_Diego.csv ../test_subcommand_weather.csv > diff.txt
