class office
{
    string address;
}
class evcharger
{
    int16 stations;
}
class pole
{
    string configuration;
    double horizontal_spacing[m];
}
class overhead_line
{
    object from;
    object to;
    string phases;
}

object office
{
    name "Building 53";
    address "2757 Sand Hill Rd., Menlo Park CA";
    latitude "37.4199";
    longitude "-122.2043";
}

object evcharger
{
    stations 6;
    latitude "37.42003";
    longitude "-122.20363";
}

object pole
{
    name "Tower 37";
    latitude 37.415045141688054;
    longitude -122.2056472090359;
    configuration flat3;
    horizontal_spacing 20 ft;
}
object pole
{
    name "Tower 36";
    latitude 37.414698020593065;
    longitude -122.20848749028133;
    configuration sideT;
    horizontal_spacing 18 ft;
}
object pole
{
    name "Tower 35";
    latitude 37.414454093051745;
    longitude -122.21044282065421;
    configuration sideT;
    horizontal_spacing 18 ft;
}
object pole
{
    name "Tower 34";
    latitude 37.4142229470058;
    longitude -122.21231366144505;
    configuration sideT;
    horizontal_spacing 18 ft;
}
object pole
{
    name "Tower 33";
    latitude 37.41398114830695;
    longitude -122.21427167402398;
    configuration sideT;
    horizontal_spacing 18 ft;
}
object pole
{
    name "Tower 32";
    latitude 37.41369674090812;
    longitude -122.21656764493814;
    configuration sideT;
    horizontal_spacing 18 ft;
}
object pole
{
    name "Tower 31";
    latitude 37.413484766152116;
    longitude -122.21826816545857;
    configuration sideT;
    horizontal_spacing 18 ft;
}
object pole
{
    name "Tower 30";
    latitude 37.413211008919944;
    longitude -122.22048098789332;
    configuration sideT;
    horizontal_spacing 18 ft;
}
object pole
{
    name "Tower 29";
    latitude 37.41297559820373;
    longitude -122.22232366549139;
    configuration sideT;
    horizontal_spacing 18 ft;
}
object pole
{
    name "Tower 28";
    latitude 37.41270503474598;
    longitude -122.22456062781153;
    configuration sideT;
    horizontal_spacing 18 ft;
}
object pole
{
    name "Tower 27";
    latitude 37.41235883992205;
    longitude -122.22736085401982;
    configuration sideT;
    horizontal_spacing 18 ft;
}
object pole
{
    name "Tower 26";
    latitude 37.41211277432232;
    longitude -122.2294046972871;
    configuration sideT;
    horizontal_spacing 18 ft;
}
object pole
{
    name "Tower 25";
    latitude 37.41181238145044;
    longitude -122.2318401430745;
    configuration 3pole;
    horizontal_spacing 20 ft;
}
object pole
{
    name "Tower 24";
    latitude 37.40995247538199;
    longitude -122.23541150437455;
    configuration 3pole;
    horizontal_spacing 20 ft;
}
object pole
{
    name "Tower 23";
    latitude 37.40912057241348;
    longitude -122.2377130888813;
    configuration 2pole;
    horizontal_spacing 20 ft;
}
object pole
{
    name "Tower 22";
    latitude 37.40789338104315;
    longitude -122.24107380619942;
    configuration 2pole;
    horizontal_spacing 20 ft;
}
object pole
{
    name "Tower 21";
    latitude 37.407149938388855;
    longitude -122.24310961753775;
    configuration 2pole;
    horizontal_spacing 20 ft;
}
object pole
{
    name "Tower 20";
    latitude 37.406444430121574;
    longitude -122.24502537152217;
    configuration 3pole;
    horizontal_spacing 20 ft;
}
object pole
{
    name "Tower 19";
    latitude 37.40562303785719;
    longitude -122.24443024849117;
    configuration vert3;
    horizontal_spacing 0 ft;
}
object pole
{
    name "Tower 18";
    latitude 37.40455757305511;
    longitude -122.24417593344417;
    configuration vert3;
    horizontal_spacing 0 ft;
}
object pole
{
    name "Tower 17";
    latitude 37.403388518198085;
    longitude -122.24428886555295;
    configuration vert3;
    horizontal_spacing 0 ft;
}
object pole
{
    name "Tower 16";
    latitude 37.4024888290699;
    longitude -122.24467711530833;
    configuration vert3;
    horizontal_spacing 0 ft;
}
object pole
{
    name "Tower 15";
    latitude 37.401360606833215;
    longitude -122.24566416822258;
    configuration vert3;
    horizontal_spacing 0 ft;
}
object pole
{
    name "Tower 14";
    latitude 37.39986734896868;
    longitude -122.24926604404577;
    configuration 3pole;
    horizontal_spacing 22 ft;
}
object pole
{
    name "Tower 13";
    latitude 37.39966304364653;
    longitude -122.25113326423049;
    configuration 2pole;
    horizontal_spacing 22 ft;
}
object pole
{
    name "Tower 12";
    latitude 37.39937036342071;
    longitude -122.25627439962648;
    configuration 2pole;
    horizontal_spacing 22 ft;
}
object pole
{
    name "Tower 11";
    latitude 37.39927723765627;
    longitude -122.25794544805741;
    configuration 3pole;
    horizontal_spacing 22 ft;
}
object pole
{
    name "Tower 10";
    latitude 37.39881734255347;
    longitude -122.26448590652335;
    configuration 3pole;
    horizontal_spacing 22 ft;
}
object pole
{
    name "Tower 9";
    latitude 37.3987093390758;
    longitude -122.26609958926933;
    configuration 2pole;
    horizontal_spacing 22 ft;
}
object pole
{
    name "Tower 8";
    latitude 37.39860603125615;
    longitude -122.26756943948794;
    configuration 3pole;
    horizontal_spacing 22 ft;
}
object pole
{
    name "Tower 7";
    latitude 37.39448377651167;
    longitude -122.27062538813342;
    configuration 3pole;
    horizontal_spacing 22 ft;
}
object pole
{
    name "Tower 6";
    latitude 37.393064766804834;
    longitude -122.27180166237235;
    configuration 3pole;
    horizontal_spacing 22 ft;
}
object pole
{
    name "Tower 5";
    latitude 37.39248478874903;
    longitude -122.27445763837264;
    configuration 2pole;
    horizontal_spacing 22 ft;
}
object pole
{
    name "Tower 4";
    latitude 37.39189776185741;
    longitude -122.27717370878581;
    configuration 2pole;
    horizontal_spacing 22 ft;
}
object pole
{
    name "Tower 3";
    latitude 37.391605029396494;
    longitude -122.27859725674931;
    configuration 2pole;
    horizontal_spacing 22 ft;
}
object pole
{
    name "Tower 2";
    latitude 37.39170991228087;
    longitude -122.28138524342816;
    configuration 3pole;
    horizontal_spacing 22 ft;
}
object pole
{
    name "Tower 1";
    latitude 37.388063971857704;
    longitude -122.28844288884694;
    configuration tower;
    horizontal_spacing 0 ft;
}

#for NEXT in ${RANGE 1,37}
#ifdef LAST
object overhead_line
{
    from "Tower ${LAST}";
    to "Tower ${NEXT}";
    phases ABC;
}
#set LAST=${NEXT}
#else
#define LAST=${NEXT}
#endif
#done

#system rm -f test_json2html.html

#output "test_json2html.html" --cluster

#on_exit 0 test ! -z test_json2html.html
