#set debug=1
#ifexist "IEEE-13.glm"
#define DIR=.
#else
#set workdir=IEEE-13-cyme
#endif

#input "${DIR:-..}/IEEE-13-cyme.mdb" -t cyme
#include "${DIR:-..}/IEEE-13-cyme-modify.glm"

#output "${DIR:-..}/IEEE-13-cyme.png" -t profile
