clock
{
	starttime "2020-01-01 00:00:00";
	stoptime "2020-01-05 00:00:00";
}

#input "https://s3-us-west-1.amazonaws.com/weather.gridlabd.us/visual_crossing/test_data.csv" -o my-weather.glm -f visualcrossing-weather -t weather -p location="Menlo Park, CA"

module tape;
object recorder
{
	parent "my-weather";
	file "weather_recorder.csv";
	property "temperature,humidity,wind_speed,opq_sky_cov";
}
