////////////////////////////////////////////////////////
// BEGIN
////////////////////////////////////////////////////////
// filename... done.glm
// workdir.... /Users/david/GitHub/dchassin/gridlabd/dchassin/python/gldcore/link/python
// command.... gridlabd validate.glm
// created.... Sun Feb  3 11:31:47 2019
// user....... david
// host....... (null)
// modules.... 1
// classes.... 1
// objects.... 1
// options.... MINIMAL

////////////////////////////////////////////////////////

// CLOCK
clock {
	timezone "PST8PDT";
	starttime "2018-01-01 00:00:00 PST";
	stoptime "2019-01-01 00:00:00 PST";
}

////////////////////////////////////////////////////////
// modules
module my_python_module {
}

////////////////////////////////////////////////////////
// classes
class test {
	randomvar x;
}

////////////////////////////////////////////////////////
// objects
object test {
	name "my_test";
	x "0.446351 MW";
}

////////////////////////////////////////////////////////
// END
////////////////////////////////////////////////////////
