module my_test;
#define my_test=yes
clock {
	starttime '2018-01-01 00:00:00';
	stoptime '2018-01-01 01:00:00';
}

class test {
	randomvar x[MW];
}

object test {
	name "my_test";
	x "type:lognormal(0,1); refresh:5min";
	on_commit python:my_test.commit;
}
