///////////////////////////////////////////////////////
//
// IEEE 123 realtime simulation model
// Copyright (C) 2016, Stanford University
// Author: dchassin@slac.stanford.edu
//
///////////////////////////////////////////////////////

//
// Read the configuration file for this system
// Assumes the model is run from parent of model folder
//
#ifexist config/local.glm
#include "config/local.glm"
#endif // exist local.glm

//
// Check the configuration
//
#ifndef PORT // this is required and defined in config/local.glm
#error config/local.glm load failed: if you have not already done so you must your server configure using config.php to create config/local.glm
#endif // PORT

///////////////////////////////////////////////////////
//
// BASIC SETTINGS
//
///////////////////////////////////////////////////////


#ifdef RANDOMSEED
#set randomseed=${RANDOMSEED} // select deterministic simulation
#endif // RANDOMSEED

#ifndef STARTTIME
#ifndef STOPTIME
//
// Realtime run
//
#set show_progress=0
#set suppress_repeat_messages=FALSE // allow all similar messages to be logged

#ifdef HOSTNAME
#set hostname=${HOSTNAME}  // tells clients where to get the data
#else
#warning HOSTNAME is not defined in either your environment or in config.glm, using localhost
#define HOSTNAME=localhost
#endif // HOSTNAME

#option server // enables the server

#set run_realtime=1 // tells the server to run in realtime mode

#set server_portnum=${PORT} // is the port that clients will connect to
#endif // STOPTIME
#endif // STARTTIME

#ifdef TIMEZONE
clock {
	timezone ${TIMEZONE};
#ifdef STARTTIME
	starttime ${STARTTIME};
#endif
#ifdef STOPTIME
	stoptime ${STOPTIME};
#endif
}
#else
#error No timezone specified
#endif // TIMEZONE

///////////////////////////////////////////////////////
//
// WEATHER
//
///////////////////////////////////////////////////////
#ifexist data/${WEATHER}
module climate;
object climate {
        name weather;
        tmyfile "data/${WEATHER}";
        interpolate QUADRATIC;
}
#else
#error No weather specified.
#endif // exist WEATHER

///////////////////////////////////////////////////////
//
// POWER SYSTEM MODEL
//
///////////////////////////////////////////////////////
module powerflow {
	solver_method NR;
	line_capacitance true;
	convergence_error_handling IGNORE;
}

#ifdef SOLAR
module generators;
#endif // SOLAR

#ifdef VOLTDUMP
object voltdump {
	filename ${VOLTDUMP};
	group "nodevolts";
	mode polar;
}
#endif // VOLTDUMP

#ifdef CURRDUMP
object currdump {
	filename ${CURRDUMP};
	mode rect;
}
#endif // CURRDUMP

//
// Powerflow component configurations
//
#include "model/library/library.glm"

//
// Power system topology
//
#include "model/library/feeder.glm"
#include "model/library/lateral.glm"

//
// Power system geoinformation
//
#include "model/library/geolocation.glm"

///////////////////////////////////////////////////////
//
// MYSQL DATABASE SUPPORT
//
///////////////////////////////////////////////////////
#ifdef MYSQL_ENABLE

#ifndef MYSQLHOST
#define MYSQLHOST=localhost
#endif // MYSQLHOST

module mysql {
	hostname "${MYSQLHOST}";
	username "gridlabd";
	password "gridlabd";
#ifdef SOCKETNAME
	socketname "${SOCKETNAME}";
#else
	port 3306;
#endif // SOCKETNAME
}

#ifdef MYSQL_SCADA
object database {
	name scada;
	schema "${MYSQL_NAME}_scada";
}
#endif // MYSQL_SCADA

#ifdef MYSQL_AMI
object database {
	name ami;
	schema "${MYSQL_NAME}_ami";
}
#endif // MYSQL_AMOI
#endif // MYSQL_ENABLE

///////////////////////////////////////////////////////
//
// LOAD MODEL
//
///////////////////////////////////////////////////////
#include "model/library/loads.glm"

///////////////////////////////////////////////////////
//
// DATA COLLECTION
//
///////////////////////////////////////////////////////

#ifdef MYSQL_ENABLE
//
// SCADA recorders
//
#ifdef MYSQL_SCADA
#include "model/library/scada.glm"
#endif // MYSQL_SCADA
#endif // MYSQL_ENABLE

///////////////////////////////////////////////////////
//
// CONTROLS
//
///////////////////////////////////////////////////////
#include "model/library/control.glm"

///////////////////////////////////////////////////////
//
// MODEL EXPORT
//
///////////////////////////////////////////////////////

#ifdef MYSQL_ENABLE

#ifdef MYSQL_MODEL

#ifndef STOPTIME
#print dumping model to '${MYSQL_MODEL}_model'
export mysql ${MYSQL_NAME}_model;
#endif // MYSQL_MODEL

#ifdef MYSQL_GRAPH
#print dumping graph to '${MYSQL_NAME}_graph'
export mysql --graph ${MYSQL_NAME}_graph;
#endif // MYSQL_GRAPH

#endif // STOPTIME

#endif // MYSQL_ENABLE

///////////////////////////////////////////////////////
//
// HISTORICAL RUN NOTICE
//
///////////////////////////////////////////////////////
#ifndef STARTTIME
#print starting realtime simulation at ${TODAY}
#else
#print starting historical simulation from ${STARTTIME} to ${STOPTIME}
#set show_progress=1
#endif


//module voltdump;
#ifdef VOLT_POWERDUMP
object voltdump {
	filemode "a";
	runtime TS_NEVER;
	maxcount 3000;
	filename "model/output/volt_dump.csv";
//	on_commit "python:voltdump.commit_voltdump";
}
module tape;

object multi_recorder {
	property substation_meter:measured_real_power, meter_1:measured_real_power, meter_2:measured_real_power, meter_3:measured_real_power, meter_4:measured_real_power, meter_5:measured_real_power, meter_6:measured_real_power, meter_7:measured_real_power, meter_8:measured_real_power, meter_9:measured_real_power, meter_10:measured_real_power, meter_11:measured_real_power, meter_12:measured_real_power, meter_13:measured_real_power, meter_14:measured_real_power, meter_15:measured_real_power, meter_16:measured_real_power, meter_17:measured_real_power, meter_18:measured_real_power, meter_19:measured_real_power, meter_20:measured_real_power, meter_21:measured_real_power, meter_22:measured_real_power, meter_23:measured_real_power, meter_24:measured_real_power, meter_25:measured_real_power, meter_26:measured_real_power, meter_27:measured_real_power, meter_28:measured_real_power, meter_29:measured_real_power, meter_30:measured_real_power;
	file "model/output/power_dump_1.csv";
	interval -1;
}

object multi_recorder {
	property meter_31:measured_real_power, meter_32:measured_real_power, meter_33:measured_real_power, meter_34:measured_real_power, meter_35:measured_real_power, meter_36:measured_real_power, meter_37:measured_real_power, meter_38:measured_real_power, meter_39:measured_real_power, meter_40:measured_real_power, meter_41:measured_real_power, meter_42:measured_real_power, meter_43:measured_real_power, meter_44:measured_real_power, meter_45:measured_real_power, meter_46:measured_real_power, meter_47:measured_real_power, meter_48:measured_real_power, meter_49:measured_real_power, meter_50:measured_real_power, meter_51:measured_real_power, meter_52:measured_real_power, meter_53:measured_real_power, meter_54:measured_real_power, meter_55:measured_real_power, meter_56:measured_real_power, meter_57:measured_real_power, meter_58:measured_real_power, meter_59:measured_real_power, meter_60:measured_real_power;
	file "model/output/power_dump_2.csv";
	interval -1;
}

object multi_recorder {
	property meter_61:measured_real_power, meter_62:measured_real_power, meter_63:measured_real_power, meter_64:measured_real_power, meter_65:measured_real_power, meter_66:measured_real_power, meter_67:measured_real_power, meter_68:measured_real_power, meter_69:measured_real_power, meter_70:measured_real_power, meter_71:measured_real_power, meter_72:measured_real_power, meter_73:measured_real_power, meter_74:measured_real_power, meter_75:measured_real_power, meter_76:measured_real_power, meter_77:measured_real_power, meter_78:measured_real_power, meter_79:measured_real_power, meter_80:measured_real_power, meter_81:measured_real_power, meter_82:measured_real_power, meter_83:measured_real_power, meter_84:measured_real_power, meter_85:measured_real_power, meter_86:measured_real_power, meter_87:measured_real_power, meter_88:measured_real_power, meter_89:measured_real_power, meter_90:measured_real_power;
	file "model/output/power_dump_3.csv";
	interval -1;
}

object multi_recorder {
	property meter_91:measured_real_power, meter_92:measured_real_power, meter_93:measured_real_power, meter_94:measured_real_power, meter_95:measured_real_power, meter_96:measured_real_power, meter_97:measured_real_power, meter_98:measured_real_power, meter_99:measured_real_power, meter_100:measured_real_power, meter_101:measured_real_power, meter_102:measured_real_power, meter_103:measured_real_power, meter_104:measured_real_power, meter_105:measured_real_power, meter_106:measured_real_power, meter_107:measured_real_power, meter_108:measured_real_power, meter_109:measured_real_power, meter_110:measured_real_power, meter_111:measured_real_power, meter_112:measured_real_power, meter_113:measured_real_power, meter_114:measured_real_power, meter_115:measured_real_power, meter_116:measured_real_power, meter_117:measured_real_power, meter_118:measured_real_power, meter_119:measured_real_power, meter_120:measured_real_power;
	file "model/output/power_dump_4.csv";
	interval -1;
}

object multi_recorder {
	property meter_121:measured_real_power, meter_122:measured_real_power, meter_123:measured_real_power, meter_124:measured_real_power, meter_125:measured_real_power, meter_126:measured_real_power, meter_127:measured_real_power, meter_128:measured_real_power, meter_129:measured_real_power, meter_130:measured_real_power, meter_131:measured_real_power, meter_132:measured_real_power, meter_133:measured_real_power, meter_134:measured_real_power, meter_135:measured_real_power, meter_136:measured_real_power, meter_137:measured_real_power, meter_138:measured_real_power, meter_139:measured_real_power, meter_140:measured_real_power, meter_141:measured_real_power, meter_142:measured_real_power, meter_143:measured_real_power, meter_144:measured_real_power, meter_145:measured_real_power, meter_146:measured_real_power, meter_147:measured_real_power, meter_148:measured_real_power, meter_149:measured_real_power, meter_150:measured_real_power;
	file "model/output/power_dump_5.csv";
	interval -1;
}

object multi_recorder {
	property meter_151:measured_real_power, meter_152:measured_real_power, meter_153:measured_real_power, meter_154:measured_real_power, meter_155:measured_real_power, meter_156:measured_real_power, meter_157:measured_real_power, meter_158:measured_real_power, meter_159:measured_real_power, meter_160:measured_real_power, meter_161:measured_real_power, meter_162:measured_real_power, meter_163:measured_real_power, meter_164:measured_real_power, meter_165:measured_real_power, meter_166:measured_real_power, meter_167:measured_real_power, meter_168:measured_real_power, meter_169:measured_real_power, meter_170:measured_real_power, meter_171:measured_real_power, meter_172:measured_real_power, meter_173:measured_real_power, meter_174:measured_real_power, meter_175:measured_real_power, meter_176:measured_real_power, meter_177:measured_real_power, meter_178:measured_real_power, meter_179:measured_real_power, meter_180:measured_real_power;
	file "model/output/power_dump_6.csv";
	interval -1;
}

object multi_recorder {
	property meter_181:measured_real_power, meter_182:measured_real_power, meter_183:measured_real_power, meter_184:measured_real_power, meter_185:measured_real_power, meter_186:measured_real_power, meter_187:measured_real_power, meter_188:measured_real_power, meter_189:measured_real_power, meter_190:measured_real_power, meter_191:measured_real_power, meter_192:measured_real_power, meter_193:measured_real_power, meter_194:measured_real_power, meter_195:measured_real_power, meter_196:measured_real_power, meter_197:measured_real_power, meter_198:measured_real_power, meter_199:measured_real_power, meter_200:measured_real_power, meter_201:measured_real_power, meter_202:measured_real_power, meter_203:measured_real_power, meter_204:measured_real_power, meter_205:measured_real_power, meter_206:measured_real_power, meter_207:measured_real_power, meter_208:measured_real_power, meter_209:measured_real_power, meter_210:measured_real_power;
	file "model/output/power_dump_7.csv";
	interval -1;
}

object multi_recorder {
	property meter_211:measured_real_power, meter_212:measured_real_power, meter_213:measured_real_power, meter_214:measured_real_power, meter_215:measured_real_power, meter_216:measured_real_power, meter_217:measured_real_power, meter_218:measured_real_power, meter_219:measured_real_power, meter_220:measured_real_power, meter_221:measured_real_power, meter_222:measured_real_power, meter_223:measured_real_power, meter_224:measured_real_power, meter_225:measured_real_power, meter_226:measured_real_power, meter_227:measured_real_power, meter_228:measured_real_power, meter_229:measured_real_power, meter_230:measured_real_power, meter_231:measured_real_power, meter_232:measured_real_power, meter_233:measured_real_power, meter_234:measured_real_power, meter_235:measured_real_power, meter_236:measured_real_power, meter_237:measured_real_power, meter_238:measured_real_power, meter_239:measured_real_power, meter_240:measured_real_power;
	file "model/output/power_dump_8.csv";
	interval -1;
}
object multi_recorder {
	file "model/output/power_dump_9.csv";
	property meter_241:measured_real_power, meter_242:measured_real_power, meter_243:measured_real_power, meter_244:measured_real_power, meter_245:measured_real_power, meter_246:measured_real_power, meter_247:measured_real_power, meter_248:measured_real_power, meter_249:measured_real_power, meter_250:measured_real_power, meter_251:measured_real_power, meter_252:measured_real_power, meter_253:measured_real_power, meter_254:measured_real_power, meter_255:measured_real_power, meter_256:measured_real_power, meter_257:measured_real_power, meter_258:measured_real_power, meter_259:measured_real_power, meter_260:measured_real_power, meter_261:measured_real_power, meter_262:measured_real_power, meter_263:measured_real_power, meter_264:measured_real_power, meter_265:measured_real_power, meter_266:measured_real_power, meter_267:measured_real_power, meter_268:measured_real_power, meter_269:measured_real_power, meter_270:measured_real_power;
	interval -1;
}

object multi_recorder {
	property meter_271:measured_real_power, meter_272:measured_real_power, meter_273:measured_real_power, meter_274:measured_real_power, meter_275:measured_real_power, meter_276:measured_real_power, meter_277:measured_real_power, meter_278:measured_real_power, meter_279:measured_real_power, meter_280:measured_real_power, meter_281:measured_real_power, meter_282:measured_real_power, meter_283:measured_real_power, meter_284:measured_real_power, meter_285:measured_real_power, meter_286:measured_real_power, meter_287:measured_real_power, meter_288:measured_real_power, meter_289:measured_real_power, meter_290:measured_real_power, meter_291:measured_real_power, meter_292:measured_real_power, meter_293:measured_real_power, meter_294:measured_real_power, meter_295:measured_real_power, meter_296:measured_real_power, meter_297:measured_real_power, meter_298:measured_real_power, meter_299:measured_real_power, meter_300:measured_real_power;
	file "model/output/power_dump_10.csv";
	interval -1;
}

object multi_recorder {
	property meter_301:measured_real_power, meter_302:measured_real_power, meter_303:measured_real_power, meter_304:measured_real_power, meter_305:measured_real_power, meter_306:measured_real_power, meter_307:measured_real_power, meter_308:measured_real_power, meter_309:measured_real_power, meter_310:measured_real_power, meter_311:measured_real_power, meter_312:measured_real_power, meter_313:measured_real_power, meter_314:measured_real_power, meter_315:measured_real_power, meter_316:measured_real_power, meter_317:measured_real_power, meter_318:measured_real_power, meter_319:measured_real_power, meter_320:measured_real_power, meter_321:measured_real_power, meter_322:measured_real_power, meter_323:measured_real_power, meter_324:measured_real_power, meter_325:measured_real_power, meter_326:measured_real_power, meter_327:measured_real_power, meter_328:measured_real_power, meter_329:measured_real_power, meter_330:measured_real_power;
	file "model/output/power_dump_11.csv";
	interval -1;
}

object multi_recorder {
	property meter_331:measured_real_power, meter_332:measured_real_power, meter_333:measured_real_power, meter_334:measured_real_power, meter_335:measured_real_power, meter_336:measured_real_power, meter_337:measured_real_power, meter_338:measured_real_power, meter_339:measured_real_power, meter_340:measured_real_power, meter_341:measured_real_power, meter_342:measured_real_power, meter_343:measured_real_power, meter_344:measured_real_power;
	file "model/output/power_dump_12.csv";
	interval -1;
}

//reactive power recordings

object multi_recorder {
	property substation_meter:measured_reactive_power, meter_1:measured_reactive_power, meter_2:measured_reactive_power, meter_3:measured_reactive_power, meter_4:measured_reactive_power, meter_5:measured_reactive_power, meter_6:measured_reactive_power, meter_7:measured_reactive_power, meter_8:measured_reactive_power, meter_9:measured_reactive_power, meter_10:measured_reactive_power, meter_11:measured_reactive_power, meter_12:measured_reactive_power, meter_13:measured_reactive_power, meter_14:measured_reactive_power, meter_15:measured_reactive_power, meter_16:measured_reactive_power, meter_17:measured_reactive_power, meter_18:measured_reactive_power, meter_19:measured_reactive_power, meter_20:measured_reactive_power, meter_21:measured_reactive_power, meter_22:measured_reactive_power, meter_23:measured_reactive_power, meter_24:measured_reactive_power;
	file "model/output/power_dump_13.csv";
	interval -1;
}

object multi_recorder {
	property meter_25:measured_reactive_power, meter_26:measured_reactive_power, meter_27:measured_reactive_power, meter_28:measured_reactive_power, meter_29:measured_reactive_power, meter_30:measured_reactive_power;
	file "model/output/power_dump_14.csv";
	interval -1;
}

object multi_recorder {
	property meter_31:measured_reactive_power, meter_32:measured_reactive_power, meter_33:measured_reactive_power, meter_34:measured_reactive_power, meter_35:measured_reactive_power, meter_36:measured_reactive_power, meter_37:measured_reactive_power, meter_38:measured_reactive_power, meter_39:measured_reactive_power, meter_40:measured_reactive_power, meter_41:measured_reactive_power, meter_42:measured_reactive_power, meter_43:measured_reactive_power, meter_44:measured_reactive_power, meter_45:measured_reactive_power, meter_46:measured_reactive_power, meter_47:measured_reactive_power, meter_48:measured_reactive_power, meter_49:measured_reactive_power, meter_50:measured_reactive_power, meter_51:measured_reactive_power, meter_52:measured_reactive_power, meter_53:measured_reactive_power, meter_54:measured_reactive_power, meter_55:measured_reactive_power, meter_56:measured_reactive_power, meter_57:measured_reactive_power, meter_58:measured_reactive_power, meter_59:measured_reactive_power, meter_60:measured_reactive_power;
	file "model/output/power_dump_15.csv";
	interval -1;
}

object multi_recorder {
	property meter_61:measured_reactive_power, meter_62:measured_reactive_power, meter_63:measured_reactive_power, meter_64:measured_reactive_power, meter_65:measured_reactive_power, meter_66:measured_reactive_power, meter_67:measured_reactive_power, meter_68:measured_reactive_power, meter_69:measured_reactive_power, meter_70:measured_reactive_power, meter_71:measured_reactive_power, meter_72:measured_reactive_power, meter_73:measured_reactive_power, meter_74:measured_reactive_power, meter_75:measured_reactive_power, meter_76:measured_reactive_power, meter_77:measured_reactive_power, meter_78:measured_reactive_power, meter_79:measured_reactive_power, meter_80:measured_reactive_power, meter_81:measured_reactive_power, meter_82:measured_reactive_power, meter_83:measured_reactive_power, meter_84:measured_reactive_power, meter_85:measured_reactive_power, meter_86:measured_reactive_power, meter_87:measured_reactive_power, meter_88:measured_reactive_power, meter_89:measured_reactive_power, meter_90:measured_reactive_power;
	file "model/output/power_dump_16.csv";
	interval -1;
}

object multi_recorder {
	property meter_91:measured_reactive_power, meter_92:measured_reactive_power, meter_93:measured_reactive_power, meter_94:measured_reactive_power, meter_95:measured_reactive_power, meter_96:measured_reactive_power, meter_97:measured_reactive_power, meter_98:measured_reactive_power, meter_99:measured_reactive_power, meter_100:measured_reactive_power, meter_101:measured_reactive_power, meter_102:measured_reactive_power, meter_103:measured_reactive_power, meter_104:measured_reactive_power, meter_105:measured_reactive_power, meter_106:measured_reactive_power, meter_107:measured_reactive_power, meter_108:measured_reactive_power, meter_109:measured_reactive_power, meter_110:measured_reactive_power, meter_111:measured_reactive_power, meter_112:measured_reactive_power, meter_113:measured_reactive_power, meter_114:measured_reactive_power;
	file "model/output/power_dump_17.csv";
	interval -1;
}

object multi_recorder {
	property meter_115:measured_reactive_power, meter_116:measured_reactive_power, meter_117:measured_reactive_power, meter_118:measured_reactive_power, meter_119:measured_reactive_power, meter_120:measured_reactive_power, meter_121:measured_reactive_power, meter_122:measured_reactive_power, meter_123:measured_reactive_power, meter_124:measured_reactive_power, meter_125:measured_reactive_power;
	file "model/output/power_dump_18.csv";
	interval -1;
}

object multi_recorder {
	property meter_126:measured_reactive_power, meter_127:measured_reactive_power, meter_128:measured_reactive_power, meter_129:measured_reactive_power, meter_130:measured_reactive_power, meter_131:measured_reactive_power, meter_132:measured_reactive_power, meter_133:measured_reactive_power, meter_134:measured_reactive_power, meter_135:measured_reactive_power, meter_136:measured_reactive_power, meter_137:measured_reactive_power, meter_138:measured_reactive_power, meter_139:measured_reactive_power, meter_140:measured_reactive_power, meter_141:measured_reactive_power, meter_142:measured_reactive_power, meter_143:measured_reactive_power, meter_144:measured_reactive_power, meter_145:measured_reactive_power, meter_146:measured_reactive_power, meter_147:measured_reactive_power, meter_148:measured_reactive_power, meter_149:measured_reactive_power, meter_150:measured_reactive_power;
	file "model/output/power_dump_19.csv";
	interval -1;
}

object multi_recorder {
	property meter_151:measured_reactive_power, meter_152:measured_reactive_power, meter_153:measured_reactive_power, meter_154:measured_reactive_power, meter_155:measured_reactive_power, meter_156:measured_reactive_power, meter_157:measured_reactive_power, meter_158:measured_reactive_power, meter_159:measured_reactive_power, meter_160:measured_reactive_power, meter_161:measured_reactive_power, meter_162:measured_reactive_power, meter_163:measured_reactive_power, meter_164:measured_reactive_power, meter_165:measured_reactive_power, meter_166:measured_reactive_power, meter_167:measured_reactive_power, meter_168:measured_reactive_power, meter_169:measured_reactive_power, meter_170:measured_reactive_power, meter_171:measured_reactive_power, meter_172:measured_reactive_power, meter_173:measured_reactive_power, meter_174:measured_reactive_power, meter_175:measured_reactive_power;
	file "model/output/power_dump_20.csv";
	interval -1;
}

object multi_recorder {
	property meter_176:measured_reactive_power, meter_177:measured_reactive_power, meter_178:measured_reactive_power, meter_179:measured_reactive_power, meter_180:measured_reactive_power, meter_181:measured_reactive_power, meter_182:measured_reactive_power, meter_183:measured_reactive_power, meter_184:measured_reactive_power;
	file "model/output/power_dump_21.csv";
	interval -1;
}

object multi_recorder {
	property meter_185:measured_reactive_power, meter_186:measured_reactive_power, meter_187:measured_reactive_power, meter_188:measured_reactive_power, meter_189:measured_reactive_power, meter_190:measured_reactive_power, meter_191:measured_reactive_power, meter_192:measured_reactive_power, meter_193:measured_reactive_power, meter_194:measured_reactive_power, meter_195:measured_reactive_power, meter_196:measured_reactive_power, meter_197:measured_reactive_power, meter_198:measured_reactive_power, meter_199:measured_reactive_power, meter_200:measured_reactive_power, meter_201:measured_reactive_power, meter_202:measured_reactive_power, meter_203:measured_reactive_power, meter_204:measured_reactive_power, meter_205:measured_reactive_power, meter_206:measured_reactive_power, meter_207:measured_reactive_power, meter_208:measured_reactive_power, meter_209:measured_reactive_power, meter_210:measured_reactive_power;
	file "model/output/power_dump_22.csv";
	interval -1;
}

object multi_recorder {
	property meter_211:measured_reactive_power, meter_212:measured_reactive_power, meter_213:measured_reactive_power, meter_214:measured_reactive_power, meter_215:measured_reactive_power, meter_216:measured_reactive_power, meter_217:measured_reactive_power, meter_218:measured_reactive_power, meter_219:measured_reactive_power, meter_220:measured_reactive_power, meter_221:measured_reactive_power, meter_222:measured_reactive_power, meter_223:measured_reactive_power, meter_224:measured_reactive_power, meter_225:measured_reactive_power, meter_226:measured_reactive_power, meter_227:measured_reactive_power, meter_228:measured_reactive_power, meter_229:measured_reactive_power, meter_230:measured_reactive_power, meter_231:measured_reactive_power, meter_232:measured_reactive_power, meter_233:measured_reactive_power, meter_234:measured_reactive_power, meter_235:measured_reactive_power;
	file "model/output/power_dump_23.csv";
	interval -1;
}

object multi_recorder {
	property meter_236:measured_reactive_power, meter_237:measured_reactive_power, meter_238:measured_reactive_power, meter_239:measured_reactive_power, meter_240:measured_reactive_power, meter_241:measured_reactive_power, meter_242:measured_reactive_power, meter_243:measured_reactive_power, meter_244:measured_reactive_power;
	file "model/output/power_dump_24.csv";
	interval -1;
}

object multi_recorder {
	file "model/output/power_dump_25.csv";
	property meter_245:measured_reactive_power, meter_246:measured_reactive_power, meter_247:measured_reactive_power, meter_248:measured_reactive_power, meter_249:measured_reactive_power, meter_250:measured_reactive_power, meter_251:measured_reactive_power, meter_252:measured_reactive_power, meter_253:measured_reactive_power, meter_254:measured_reactive_power, meter_255:measured_reactive_power, meter_256:measured_reactive_power, meter_257:measured_reactive_power, meter_258:measured_reactive_power, meter_259:measured_reactive_power, meter_260:measured_reactive_power, meter_261:measured_reactive_power, meter_262:measured_reactive_power, meter_263:measured_reactive_power, meter_264:measured_reactive_power, meter_265:measured_reactive_power, meter_266:measured_reactive_power, meter_267:measured_reactive_power, meter_268:measured_reactive_power, meter_269:measured_reactive_power, meter_270:measured_reactive_power;
	interval -1;
}

object multi_recorder {
	property meter_271:measured_reactive_power, meter_272:measured_reactive_power, meter_273:measured_reactive_power, meter_274:measured_reactive_power, meter_275:measured_reactive_power, meter_276:measured_reactive_power, meter_277:measured_reactive_power, meter_278:measured_reactive_power, meter_279:measured_reactive_power, meter_280:measured_reactive_power, meter_281:measured_reactive_power, meter_282:measured_reactive_power, meter_283:measured_reactive_power, meter_284:measured_reactive_power, meter_285:measured_reactive_power, meter_286:measured_reactive_power, meter_287:measured_reactive_power, meter_288:measured_reactive_power, meter_289:measured_reactive_power, meter_290:measured_reactive_power, meter_291:measured_reactive_power, meter_292:measured_reactive_power, meter_293:measured_reactive_power, meter_294:measured_reactive_power, meter_295:measured_reactive_power, meter_296:measured_reactive_power, meter_297:measured_reactive_power, meter_298:measured_reactive_power, meter_299:measured_reactive_power;
	file "model/output/power_dump_26.csv";
	interval -1;
}

object multi_recorder {
	property meter_300:measured_reactive_power, meter_301:measured_reactive_power, meter_302:measured_reactive_power, meter_303:measured_reactive_power, meter_304:measured_reactive_power, meter_305:measured_reactive_power, meter_306:measured_reactive_power, meter_307:measured_reactive_power, meter_308:measured_reactive_power, meter_309:measured_reactive_power, meter_310:measured_reactive_power, meter_311:measured_reactive_power, meter_312:measured_reactive_power, meter_313:measured_reactive_power, meter_314:measured_reactive_power, meter_315:measured_reactive_power, meter_316:measured_reactive_power, meter_317:measured_reactive_power, meter_318:measured_reactive_power, meter_319:measured_reactive_power, meter_320:measured_reactive_power, meter_321:measured_reactive_power, meter_322:measured_reactive_power, meter_323:measured_reactive_power, meter_324:measured_reactive_power, meter_325:measured_reactive_power, meter_326:measured_reactive_power, meter_327:measured_reactive_power, meter_328:measured_reactive_power;
	file "model/output/power_dump_27.csv";
	interval -1;
}

object multi_recorder {
	property meter_329:measured_reactive_power, meter_330:measured_reactive_power, meter_331:measured_reactive_power, meter_332:measured_reactive_power, meter_333:measured_reactive_power, meter_334:measured_reactive_power, meter_335:measured_reactive_power, meter_336:measured_reactive_power, meter_337:measured_reactive_power, meter_338:measured_reactive_power, meter_339:measured_reactive_power, meter_340:measured_reactive_power, meter_341:measured_reactive_power, meter_342:measured_reactive_power, meter_343:measured_reactive_power, meter_344:measured_reactive_power;
	file "model/output/power_dump_28.csv";
	interval -1;
}

#endif //VOLT_POWERDUMP
//script on_commit "python volt_dump.py"
