#set suppress_repeat_messages=FALSE

clock {
    timezone "PST+8PDT";
	starttime '2020-01-01 00:00:00';
	stoptime '2021-01-01 00:00:00';
}

///////////////////////////////////////
// weather model
///////////////////////////////////////

module climate;
#weather get CA-Chino_Airport.tmy3
object climate {
	name weather;
	tmyfile "CA-Chino_Airport.tmy3";
}

///////////////////////////////////////
// pole model
///////////////////////////////////////
module powerflow;

class equipment
{
    enumeration {FAILED=0, OK=1} status;
}

object equipment
{
    name device1;
    status OK;
}

object pole_configuration {
	name "WOOD-C-45/5";
	pole_type WOOD;
	pole_length 45 ft;
	pole_depth 4.5 ft;
	ground_diameter (32.5/3.14);
	top_diameter (19/3.14);
	fiber_strength 8000 psi;
	repair_time 1 h;
}

object pole {
    name pole1;
    weather weather;
    configuration "WOOD-C-45/5";
    tilt_angle 5 deg;
    tilt_direction 270;
    install_year 1990;
    object pole_mount {
        equipment device1;
        weight 250 lb;
        area 4 sf;
        height 35 ft;
    };
};

object pole {
	name pole2;
	weather weather;
	configuration "WOOD-C-45/5";
	tilt_angle 8 deg;
	tilt_direction 180;
	install_year 2000;
    object pole_mount {
        equipment device2;
        weight 250 lb;
        area 4 sf;
        height 35 ft;
    };
}

object equipment
{
    name device2;
    status OK;
}

///////////////////////////////////////
// recorder model
///////////////////////////////////////

module tape
{
    csv_header_type NAME;
}
object multi_recorder {
	interval 3600;
	property "weather:wind_speed, weather:wind_dir";
#for POLE in ${FIND class=pole}
    property "${POLE}:tilt_angle, ${POLE}:tilt_direction";
    property "${POLE}:pole_stress, ${POLE}:total_moment, ${POLE}:resisting_moment";
    property "${POLE}:susceptibility, ${POLE}:status";
    property "${POLE/pole/device}:status";
#done
	file test_pole.csv;
}

#ifexist "../test_pole.csv"
#on_exit 0 diff -q test_pole.csv ../test_pole.csv
#endif
