clock
{
    timezone "PST+8PDT";
    starttime "2020-01-01 00:00:00 PST";
    stoptime "2021-01-01 00:00:00 PST";
}

module residential
{
    implicit_enduses "DISHWASHER|MICROWAVE|RANGE|CLOTHESWASHER|DRYER";
    curtailment_enduses "DISHWASHER|MICROWAVE|RANGE|CLOTHESWASHER|DRYER";
    curtailment_active TRUE;
}

module tape
{
    csv_header_type NAME;
}

object house
{
    object recorder
    {
        file "test_curtailment.csv";
        interval -1;
        property "panel.power";
    };
}

#ifexist ../test_curtailment.csv
#on_exit 0 diff ../test_curtailment.csv test_curtailment.csv > gridlabd.diff
#endif
