module residential
{
	implicit_enduses TYPICAL;
}

object house
{
}

clock
{
	timezone "PST+8PDT";
	starttime "2020-01-01 00:00:00 PST";
	stoptime "2021-01-01 00:00:00 PST";
}

#option loadshape=test_loadshape_dump.csv

#ifexist ../test_loadshape_dump.csv
#on_exit 0 diff test_loadshape_dump.csv ../test_loadshape_dump.csv > gridlabd.diff
#endif
