// $Id: test_residentialenduse_standalone.glm 4738 2014-07-03 00:55:39Z dchassin $
// Test standalone lighting objects
//

#set suppress_repeat_messages=0

clock {
	timezone PST+8PDT;
	starttime '2000-01-01 0:00:00 PST';
	stoptime '2001-01-01 0:00:00 PST';
}

module residential;

schedule weekly {
	* * * * 1-5 5 // 5/7 of energy on weekdays
	* * * * 6-0 2 // 2/7 of energy on weekends
}

// this object should generate a continuous load of about 416.67W
object residential_enduse {
	name res-enduse-basic;
	shape "type:analog; schedule: weekly; energy: 10 kWh";
}

// this object should generate an error about a missing schedule
object residential_enduse {
	name res-enduse-none;
	shape "type:analog; energy: 10kWh";
}
