clock
{
    timezone "PST+8PDT";
    starttime "2020-01-01 00:00:00 PST";
    stoptime "2020-02-01 00:00:00 PST";
}
module residential
{
    implicit_enduses SUMP|LIGHTS|PLUGS;
}
module tape
{
    csv_header_type NAME;
}
object house
{
    sump_status "OFF";
    object recorder
    {
        file "test_sump.csv";
        property "panel.power";
        interval -1;
    };
}

#ifdef ../test_sump.csv
#on_exit 0 diff ../test_sump.csv test_sump.csv > gridlabd.diff
#endif
