clock
{
    timezone "PST+8PDT";
    starttime "2020-01-01 00:00:00 PST";
    stoptime "2020-02-01 00:00:00 PST";
}
module residential
{
    implicit_enduses SUMP|LIGHTS;
    paneldump_interval 3600;
    paneldump_filename "test_sump_implicit_paneldump.csv";
}
module tape
{
    csv_header_type NAME;
}
object house
{
    sump_status "OFF";
    object recorder
    {
        file "test_sump_implicit.csv";
        property "panel.power[W]";
        interval -1;
    };
}

#ifdef ../test_sump_implicit.csv
#on_exit 0 diff ../test_sump_implicit.csv test_sump_implicit.csv > gridlabd.diff
#endif
