// gldcore/link/python/test_memory.glm
//
// This test uses all the available event handlers for python
//

// load the custom python module
module test_memory_module;

// setup the clock to run only 1 hour
clock {
	starttime "2018-01-01 00:00:00";
	stoptime "2019-01-01 00:00:00";
}

// create a custom class that generates a random power
class test {
	randomvar x[MW];
    double y[kW];
}

// create an instance of the custom class
object test:..100 {
	x "type:lognormal(0,1); refresh:1h";

	// dispatch commit calls to the python module
    on_init "python:test_memory_module.init";
	on_precommit "python:test_memory_module.precommit";
    on_presync "python:test_memory_module.presync";
    on_sync "python:test_memory_module.sync";
    on_postsync "python:test_memory_module.postsync";
	on_commit "python:test_memory_module.commit";
}
