clock
{
	timezone "US/CA/Los Angeles";
	starttime "2020-04-01 00:00:00 PST";
	stoptime "2021-04-01 00:00:00 PST";
}

module climate;

object climate
{
	tmyfile "../WA-Yakima.tmy3";
}

module residential
{
	paneldump_interval 300;
}

object house
{
	heating_setpoint "68 degF";
}
