// $Id: test_lights_implicit_power1.glm 4738 2014-07-03 00:55:39Z dchassin $
// Test: Single lights object inside of a house with an implicit schedue for the Weekday Summer.
// ID: D3P706

#set suppress_repeat_messages=0
#set debug=1

clock
{
	timezone PST+8PDT;
	starttime '2001-07-03 00:00:00 PST';
	stoptime '2001-07-04 00:00:00 PST';
}

module residential
{
	implicit_enduses LIGHTS|PLUGS|WATERHEATER|DRYER|RANGE;
	paneldump_interval 3600;
}
module tape;

object house
{
	heating_setpoint 5;
	cooling_setpoint 300;
	air_temperature 70;
	outdoor_temperature 73;
	gas_enduses "WATERHEATER|RANGE|DRYER";
	object recorder
	{
		property panel.real;
		file "paneltotal.csv";
		interval 1h;
	};
}
