//
// Test purpose: validating internal_gains calculation over time; verifies
// that the code uses the following equation correctly;
//	internal_gains = power*heat_fraction
//
//heat_fraction varies over time, this might be overtesting it

// Payroll: d3y332


clock {
	timestamp '2000-01-01 0:00:00';
	stoptime '2000-01-02 1:00:00';
	timezone PST+8PDT;
}

module tape;
module residential;
module assert;


object house {
	floor_area 1500 sf;
	cooling_setpoint 100; // turns of HVAC
	heating_setpoint 1;
	object plugload {
		installed_power .1;
		demand 1;
		heatgain_fraction .5;
		object player {
			file ../generic_demand.glt; //used as heat fraction in this case
			loop 24;
			property heatgain_fraction;
		};
//		object double_assert {
//			target "internal_gains";
//			within 0.000001;
//			object player {
//				property value;
//				file ../plugload_internal_gains_hf.player;
//			};
//		};
		object recorder {
			file "plugload_load_usage3600.csv";
			interval 3600;
			limit 28;
			property demand,actual_power,heatgain_fraction,heatgain;
		};
	};
}
