// test_class_event.glm

#set pythonpath=..:.

module test_class_event;

clock
{
    timezone "US/CO/Denver";
    starttime "2020-07-01 00:00:00 MDT";
    stoptime "2020-08-01 00:00:00 MDT";
}

class test
{
    bool object_event;
    on_precommit "python:test_class_event.test_class_precommit";
    on_commit "python:test_class_event.test_class_commit";
}

object test:..5
{
    object_event FALSE;
}

object test:..5
{
    object_event TRUE;
    on_precommit "python:test_class_event.test_object_precommit";
    on_commit "python:test_class_event.test_object_commit";
}
