// Exercise 2.3.3;
#set randomseed=123
module residential
{
	implicit_enduses NONE;
}
module tape
{
	csv_header_type NAME;
}

clock
{
	timezone "PST+8PDT";
	starttime '2001-01-01 00:00:00 PST';
	stoptime '2001-01-03 00:00:00 PST';
}

schedule waterheater_demand_prob
{
	* 5-21 * * * 0.99;
	* 22-4 * * * 0.01;
}

class waterheater
{
	loadshape myshape;
}

object house
{
	object waterheater
	{
		myshape "type: pulsed; schedule: waterheater_demand_prob; energy: 1 kWh; count: 6; power: 1.1 kW";
		impedance_fraction 1.0;
		water_demand this.myshape;
		heating_element_capacity 4500;
		object recorder
		{
			file "test_loadshape_exercise_2_3_3.csv";
			property "power,water_demand,energy";
		};
		power_factor 0.0;
		power_fraction 0.0;
		current_fraction 0.0;
	};
}

#ifexist ../test_loadshape_exercise_2_3_3.csv
#on_exit 0 diff ../test_loadshape_exercise_2_3_3.csv test_loadshape_exercise_2_3_3.csv > gridlabd.diff
#endif
