#set output_message_context=NONE // silence the core
#set verbose=TRUE // enable verbose
#set debug=TRUE // enable debug

clock {
	starttime '2000-01-01 00:00:00';
	stoptime '2000-01-02 00:00:00';
}
module residential {
	message_flags VERBOSE|DEBUG;
}

object house {
	flags VERBOSE|DEBUG;
	name house1;
}
