#set literal_if=FALSE
#define TEST=yes

#if TEST!=yes
#error test failed
#endif

#if TEST!="yes"
#error test failed
#endif

#if TEST != yes
#error test failed
#endif

#if TEST != "yes"
#error test failed
#endif
