#option debug
#set suppress_repeat_messages=false

#version ${version.major}.${version.minor}.${version.patch}
#version -ne 4.1
#version -gt 4.2.0
#version -ge 4.2
#version -le 999999
#version -lt 999.999
#version -gt 4.1
#version -ge 4.2.1 -ge 191217
#version -ge A
#version -le z
