#loaddata -s=CA -r=1 -v=2023 -w=ACTUAL -y=2018 -b=MEDIUMOFFICE -e=heating -f=electricity,natural_gas -t=1H -a=10000 -o=${modelname/.glm/.csv}

module tape
{
    csv_header_type NAME;
}

clock
{
    timezone "PST+8PDT";
    starttime "2018-01-01 00:00:00 PST";
    stoptime "2019-01-01 00:00:00 PST";
}

class test
{
    double electricity[kWh];
    double natural_gas[kBtu];
}

object test
{
    object player
    {
        file ${modelname/.glm/.csv};
    };
    object recorder
    {
        file "${modelname/.glm/_out.csv}";
        property "electricity,natural_gas";
        interval -1;
    };
}

#ifexist ../${modelname/.glm/_out.csv}
#on_exit 0 diff ../${modelname/.glm/_out.csv} ${modelname/.glm/_out.csv} > gridlabd.diff
#endif
