// generated from 'gridlabd fit_filter -o=./test_fit_filter_power.csv -i=./test_fit_filter_weather.csv -g=test_fit_filter_opt.glm'
#define FIT_FILTER_VERSION_NUMBER=4.3.1
#define FIT_FILTER_VERSION_BUILD=230420
#define FIT_FILTER_VERSION_BRANCH=develop_fix_warnings

// datetime --> real_power
filter real_power_datetime(z,1h,0) = (+3.623106z^24-0.017946z^23+3.001864z^22+0.396459z^21-1.748367z^20-0.076999z^19-1.066438z^18-0.130105z^17-1.566783z^16+0.064437z^15+1.420731z^14-0.108540z^13+0.444174z^12-0.053894z^11+0.086299z^10+0.246488z^9-1.111616z^8-0.155597z^7+0.003624z^6-0.053142z^5+0.032900z^4-0.014080z^3+0.044238z^2+0.011413z^1+0.262105z^0-0.446883 ) / (z^24-1.089725z^23+0.155597z^22+0.089853z^21-0.034706z^20-0.003624z^19+0.009982z^18+0.030937z^17+0.053142z^16+0.007617z^15-0.105643z^14-0.032900z^13+0.058990z^12-0.053445z^11+0.014080z^10+0.110442z^9-0.014187z^8-0.044238z^7-0.030616z^6-0.007644z^5-0.011413z^4+0.028332z^3-0.025925z^2-0.262105z^1+0.157685);

// solar --> real_power
filter real_power_solar(z,1h,0) = (+3.623106z^24-0.017946z^23+3.001864z^22+0.396459z^21-1.748367z^20-0.076999z^19-1.066438z^18-0.130105z^17-1.566783z^16+0.064437z^15+1.420731z^14-0.108540z^13+0.444174z^12-0.053894z^11+0.086299z^10+0.246488z^9-1.111616z^8-0.155597z^7+0.003624z^6-0.053142z^5+0.032900z^4-0.014080z^3+0.044238z^2+0.011413z^1+0.262105z^0-1.111616 ) / (z^24-1.089725z^23+0.155597z^22+0.089853z^21-0.034706z^20-0.003624z^19+0.009982z^18+0.030937z^17+0.053142z^16+0.007617z^15-0.105643z^14-0.032900z^13+0.058990z^12-0.053445z^11+0.014080z^10+0.110442z^9-0.014187z^8-0.044238z^7-0.030616z^6-0.007644z^5-0.011413z^4+0.028332z^3-0.025925z^2-0.262105z^1+0.157685);

// temperature --> real_power
filter real_power_temperature(z,1h,0) = (+3.623106z^24-0.017946z^23+3.001864z^22+0.396459z^21-1.748367z^20-0.076999z^19-1.066438z^18-0.130105z^17-1.566783z^16+0.064437z^15+1.420731z^14-0.108540z^13+0.444174z^12-0.053894z^11+0.086299z^10+0.246488z^9-1.111616z^8-0.155597z^7+0.003624z^6-0.053142z^5+0.032900z^4-0.014080z^3+0.044238z^2+0.011413z^1+0.262105z^0+0.267470 ) / (z^24-1.089725z^23+0.155597z^22+0.089853z^21-0.034706z^20-0.003624z^19+0.009982z^18+0.030937z^17+0.053142z^16+0.007617z^15-0.105643z^14-0.032900z^13+0.058990z^12-0.053445z^11+0.014080z^10+0.110442z^9-0.014187z^8-0.044238z^7-0.030616z^6-0.007644z^5-0.011413z^4+0.028332z^3-0.025925z^2-0.262105z^1+0.157685);
